# переменные заданные в методике
a := 3
b := 42
T := a
S := a  # переприсваивание переменных
U := b
G := b
t := rnorm(10, T, U)
u := runif(10, S, G)  # функции расчета
# полученный результат
t = [-50.756; 34.8959; -13.4939; -47.5492; -40.5484; 2.18844; 4.34273; 14.1272; 23.644; 13.0095]
u = [40.2726; 9.88686; 8.13415; 40.1167; 4.08584; 5.18118; 8.13428; 36.708; 31.1441; 3.57263]
